<Lems>
    <Include file="NeuroMLCoreCompTypes.xml"/>
    <Include file="Simulation.xml" />

    <!-- begin simulation setup -->
    <ggj id="ggj1"/>
    <Target component="sim1" />
    <Simulation id="sim1" length="0.001s" step="0.00000001s" target="ggj1">
        <Display id="d0" title="Plot title" timeScale="1ms" xmin="0"  xmax="1" ymin="-0.1" ymax="0.1">
            <Line id="head1" quantity="head1_V" scale="1" color="#FF0000" timeScale="1ms" />
            <Line id="head2" quantity="head2_V" scale="1" color="#FF0000" timeScale="1ms" />
            <Line id="neck1" quantity="neck1_V" scale="1" color="#FF0000" timeScale="1ms" />
            <Line id="neck2" quantity="neck2_V" scale="1" color="#FF0000" timeScale="1ms" />
        </Display>
    </Simulation>
    <!-- end simulation setup -->

    <ComponentType name="ggj" description="de Gruijl 2016">

        <!-- begin import voltage/export current -->
        <Constant name="dend1_V" dimension="none" value="-0.0610000000000000"/>
        <Constant name="dend2_V" dimension="none" value="-0.0610000000000000"/>
        <Exposure name="I_inward_dend1" dimension="none"/>
        <Exposure name="I_inward_dend2" dimension="none"/>
        <!-- end import voltage/export current -->

        <!-- begin model -->
        <Constant name="pi" dimension="none" value="3.14159265"/>
        <Constant name="F" dimension="none" value="96485"/>
        <Constant name="R" dimension="none" value="8.314"/>
        <Constant name="D_CA" dimension="none" value="0.79e-9"/>
        <Constant name="D_CL" dimension="none" value="2.08e-9"/>
        <Constant name="T" dimension="none" value="293"/>
        <Constant name="Cm" dimension="none" value="2e-2"/>
        <Constant name="qqqqq" dimension="time" value="1s"/>
        <Constant name="dend1_half_G_CL" dimension="none" value="100"/>
        <Constant name="dend1_half_G_CA" dimension="none" value="100"/>
        <Constant name="dend2_half_G_CL" dimension="none" value="100"/>
        <Constant name="dend2_half_G_CA" dimension="none" value="100"/>
        <Constant name="neck1_Gleak" dimension="none" value="1.00000000000000E-8"/>
        <Constant name="neck2_Gleak" dimension="none" value="1.00000000000000E-8"/>
        <Constant name="head1_tau_d" dimension="none" value="0.255000000000000"/>
        <Constant name="head1_tau_r" dimension="none" value="0.00500000000000000"/>
        <Constant name="head1_gbar_gaba" dimension="none" value="1.00000000000000E-9"/>
        <Constant name="head1_tau_gaba0" dimension="none" value="0.0300000000000000"/>
        <Constant name="head1_eta_gaba" dimension="none" value="0.0340000000000000"/>
        <Constant name="head1_theta_gaba" dimension="none" value="0.00120000000000000"/>
        <Constant name="head1_sigma_gaba" dimension="none" value="0.0000600000000000000"/>
        <Constant name="head1_beta" dimension="none" value="0.0800000000000000"/>
        <Constant name="head1_Kp" dimension="none" value="0.000200000000000000"/>
        <Constant name="head1_Ip" dimension="none" value="0.000470000000000000"/>
        <Constant name="head1_gamma" dimension="none" value="0"/>
        <Constant name="head1_I_max" dimension="none" value="30"/>
        <Constant name="head1_kK" dimension="none" value="9"/>
        <Constant name="head1_kCL" dimension="none" value="1"/>
        <Constant name="head1_Gleak" dimension="none" value="1.00000000000000E-8"/>
        <Constant name="head1_n_Mg_out" dimension="none" value="2"/>
        <Constant name="head1_gbar_nmda" dimension="none" value="2.00000000000000E-10"/>
        <Constant name="head1_tau_decay_nmda" dimension="none" value="0.0890000000000000"/>
        <Constant name="head1_tau_rise_nmda" dimension="none" value="0.00120000000000000"/>
        <Constant name="head1_E_K_NA" dimension="none" value="0.0100000000000000"/>
        <Constant name="head1_E_head_ca" dimension="none" value="0.0100000000000000"/>
        <Constant name="head1_nTB" dimension="none" value="0.100000000000000"/>
        <Constant name="head1_kf" dimension="none" value="1000000.00000000"/>
        <Constant name="head1_kb" dimension="none" value="500"/>
        <Constant name="head2_tau_d" dimension="none" value="0.255000000000000"/>
        <Constant name="head2_tau_r" dimension="none" value="0.00500000000000000"/>
        <Constant name="head2_gbar_gaba" dimension="none" value="1.00000000000000E-9"/>
        <Constant name="head2_tau_gaba0" dimension="none" value="0.0300000000000000"/>
        <Constant name="head2_eta_gaba" dimension="none" value="0.0340000000000000"/>
        <Constant name="head2_theta_gaba" dimension="none" value="0.00120000000000000"/>
        <Constant name="head2_sigma_gaba" dimension="none" value="0.0000600000000000000"/>
        <Constant name="head2_beta" dimension="none" value="0.0800000000000000"/>
        <Constant name="head2_Kp" dimension="none" value="0.000200000000000000"/>
        <Constant name="head2_Ip" dimension="none" value="0.000470000000000000"/>
        <Constant name="head2_gamma" dimension="none" value="0"/>
        <Constant name="head2_I_max" dimension="none" value="30"/>
        <Constant name="head2_kK" dimension="none" value="9"/>
        <Constant name="head2_kCL" dimension="none" value="1"/>
        <Constant name="head2_Gleak" dimension="none" value="1.00000000000000E-8"/>
        <Constant name="head2_n_Mg_out" dimension="none" value="2"/>
        <Constant name="head2_gbar_nmda" dimension="none" value="2.00000000000000E-10"/>
        <Constant name="head2_tau_decay_nmda" dimension="none" value="0.0890000000000000"/>
        <Constant name="head2_tau_rise_nmda" dimension="none" value="0.00120000000000000"/>
        <Constant name="head2_E_K_NA" dimension="none" value="0.0100000000000000"/>
        <Constant name="head2_E_head_ca" dimension="none" value="0.0100000000000000"/>
        <Constant name="head2_nTB" dimension="none" value="0.100000000000000"/>
        <Constant name="head2_kf" dimension="none" value="1000000.00000000"/>
        <Constant name="head2_kb" dimension="none" value="500"/>
        <Constant name="out_n_K" dimension="none" value="3"/>
        <Constant name="out_n_CL" dimension="none" value="134"/>
        <Constant name="out_n_CA" dimension="none" value="2"/>
        <Constant name="neck1_diam" dimension="none" value="1.00000000000000E-7"/>
        <Constant name="neck1_length" dimension="none" value="1.00000000000000E-7"/>
        <Constant name="neck1_n_K" dimension="none" value="85"/>
        <Constant name="head1_diam" dimension="none" value="1.00000000000000E-7"/>
        <Constant name="head1_length" dimension="none" value="1.00000000000000E-7"/>
        <Constant name="head1_n_K" dimension="none" value="85"/>
        <Constant name="head1_ggap" dimension="none" value="1.50000000000000E-11"/>
        <Constant name="neck2_diam" dimension="none" value="1.00000000000000E-7"/>
        <Constant name="neck2_length" dimension="none" value="1.00000000000000E-7"/>
        <Constant name="neck2_n_K" dimension="none" value="85"/>
        <Constant name="head2_diam" dimension="none" value="1.00000000000000E-7"/>
        <Constant name="head2_length" dimension="none" value="1.00000000000000E-7"/>
        <Constant name="head2_n_K" dimension="none" value="85"/>
        <Constant name="head2_ggap" dimension="none" value="1.50000000000000E-11"/>
        <Constant name="dend1_diam" dimension="none" value="0.00000100000000000000"/>
        <Constant name="dend1_length" dimension="none" value="0.00000100000000000000"/>
        <Constant name="dend1_n_K" dimension="none" value="85"/>
        <Constant name="dend1_n_CL" dimension="none" value="15"/>
        <Constant name="dend1_n_CA" dimension="none" value="15"/>
        <Constant name="dend2_diam" dimension="none" value="0.00000100000000000000"/>
        <Constant name="dend2_length" dimension="none" value="0.00000100000000000000"/>
        <Constant name="dend2_n_K" dimension="none" value="85"/>
        <Constant name="dend2_n_CL" dimension="none" value="15"/>
        <Constant name="dend2_n_CA" dimension="none" value="15"/>
        <Dynamics>
            <DerivedVariable name="I_inward_dend1" value="-(-dend1_V + neck1_V - R*T*log(dend1_n_CL/neck1_n_CL)/F)/(1/dend1_half_G_CL + 2.0*R*T*neck1_length/(pi*D_CL*F^2*neck1_diam^2*neck1_n_CL)) - (-dend1_V + neck1_V + R*T*log(dend1_n_CA/neck1_n_CA)/(2*F))/(1/dend1_half_G_CA + 0.5*R*T*neck1_length/(pi*D_CA*F^2*neck1_diam^2*neck1_n_CA))" dimension="none" exposure="I_inward_dend1"/>
            <DerivedVariable name="I_inward_dend2" value="-(-dend2_V + neck2_V - R*T*log(dend2_n_CL/neck2_n_CL)/F)/(1/dend2_half_G_CL + 2.0*R*T*neck2_length/(pi*D_CL*F^2*neck2_diam^2*neck2_n_CL)) - (-dend2_V + neck2_V + R*T*log(dend2_n_CA/neck2_n_CA)/(2*F))/(1/dend2_half_G_CA + 0.5*R*T*neck2_length/(pi*D_CA*F^2*neck2_diam^2*neck2_n_CA))" dimension="none" exposure="I_inward_dend2"/>
            <StateVariable name="neck1_V" dimension="none" exposure="neck1_V"/>
            <StateVariable name="neck1_n_CL" dimension="none" exposure="neck1_n_CL"/>
            <StateVariable name="neck1_n_CA" dimension="none" exposure="neck1_n_CA"/>
            <StateVariable name="head1_V" dimension="none" exposure="head1_V"/>
            <StateVariable name="head1_n_CL" dimension="none" exposure="head1_n_CL"/>
            <StateVariable name="head1_n_CA" dimension="none" exposure="head1_n_CA"/>
            <StateVariable name="head1_n_B" dimension="none" exposure="head1_n_B"/>
            <StateVariable name="head1_ggaba" dimension="none" exposure="head1_ggaba"/>
            <StateVariable name="head1_Y" dimension="none" exposure="head1_Y"/>
            <StateVariable name="head1_X" dimension="none" exposure="head1_X"/>
            <StateVariable name="head1_ca_presyn" dimension="none" exposure="head1_ca_presyn"/>
            <StateVariable name="neck2_V" dimension="none" exposure="neck2_V"/>
            <StateVariable name="neck2_n_CL" dimension="none" exposure="neck2_n_CL"/>
            <StateVariable name="neck2_n_CA" dimension="none" exposure="neck2_n_CA"/>
            <StateVariable name="head2_V" dimension="none" exposure="head2_V"/>
            <StateVariable name="head2_n_CL" dimension="none" exposure="head2_n_CL"/>
            <StateVariable name="head2_n_CA" dimension="none" exposure="head2_n_CA"/>
            <StateVariable name="head2_n_B" dimension="none" exposure="head2_n_B"/>
            <StateVariable name="head2_ggaba" dimension="none" exposure="head2_ggaba"/>
            <StateVariable name="head2_Y" dimension="none" exposure="head2_Y"/>
            <StateVariable name="head2_X" dimension="none" exposure="head2_X"/>
            <StateVariable name="head2_ca_presyn" dimension="none" exposure="head2_ca_presyn"/>
            <DerivedVariable name="x0" value="1/neck1_length" dimension="none"/>
            <DerivedVariable name="x1" value="-neck1_V" dimension="none"/>
            <DerivedVariable name="x2" value="1/neck1_n_CL" dimension="none"/>
            <DerivedVariable name="x3" value="1/F" dimension="none"/>
            <DerivedVariable name="x4" value="R*T" dimension="none"/>
            <DerivedVariable name="x5" value="x3*x4" dimension="none"/>
            <DerivedVariable name="x6" value="-dend1_V + neck1_V" dimension="none"/>
            <DerivedVariable name="x7" value="neck1_diam^(-2)" dimension="none"/>
            <DerivedVariable name="x8" value="1/pi" dimension="none"/>
            <DerivedVariable name="x9" value="x4*x8/F^2" dimension="none"/>
            <DerivedVariable name="x10" value="neck1_length*x7*x9" dimension="none"/>
            <DerivedVariable name="x11" value="2.0/D_CL" dimension="none"/>
            <DerivedVariable name="x12" value="x10*x11*x2" dimension="none"/>
            <DerivedVariable name="x13" value="-head1_V" dimension="none"/>
            <DerivedVariable name="x14" value="neck1_V + x13" dimension="none"/>
            <DerivedVariable name="x15" value="1/head1_n_CL" dimension="none"/>
            <DerivedVariable name="x16" value="head1_diam^2" dimension="none"/>
            <DerivedVariable name="x17" value="1/x16" dimension="none"/>
            <DerivedVariable name="x18" value="head1_length*x17" dimension="none"/>
            <DerivedVariable name="x19" value="x11*x9" dimension="none"/>
            <DerivedVariable name="x20" value="x15*x18*x19" dimension="none"/>
            <DerivedVariable name="x21" value="1/(x12 + x20)" dimension="none"/>
            <DerivedVariable name="x22" value="neck1_Gleak*(x1 - x5*log(out_n_CL*x2)) - x21*(x14 - x5*log(head1_n_CL*x2)) - (-x5*log(dend1_n_CL*x2) + x6)/(x12 + 1/dend1_half_G_CL)" dimension="none"/>
            <DerivedVariable name="x23" value="2.5e-20*F" dimension="none"/>
            <DerivedVariable name="x24" value="1/neck1_n_CA" dimension="none"/>
            <DerivedVariable name="x25" value="x5/2" dimension="none"/>
            <DerivedVariable name="x26" value="0.5/D_CA" dimension="none"/>
            <DerivedVariable name="x27" value="x10*x24*x26" dimension="none"/>
            <DerivedVariable name="x28" value="1/head1_n_CA" dimension="none"/>
            <DerivedVariable name="x29" value="x26*x9" dimension="none"/>
            <DerivedVariable name="x30" value="x18*x28*x29" dimension="none"/>
            <DerivedVariable name="x31" value="1/(x27 + x30)" dimension="none"/>
            <DerivedVariable name="x32" value="-x23*(neck1_n_CA - 5.0e-5) - x31*(x14 + x25*log(head1_n_CA*x24)) - (x25*log(dend1_n_CA*x24) + x6)/(x27 + 1/dend1_half_G_CA)" dimension="none"/>
            <DerivedVariable name="x33" value="x8/Cm" dimension="none"/>
            <DerivedVariable name="x34" value="x3*x8" dimension="none"/>
            <DerivedVariable name="x35" value="4*x34" dimension="none"/>
            <DerivedVariable name="x36" value="x0*x7" dimension="none"/>
            <DerivedVariable name="x37" value="2*x34" dimension="none"/>
            <DerivedVariable name="x38" value="1/head1_length" dimension="none"/>
            <DerivedVariable name="x39" value="head2_V + x13" dimension="none"/>
            <DerivedVariable name="x40" value="1/head2_n_CL" dimension="none"/>
            <DerivedVariable name="x41" value="head2_diam^2" dimension="none"/>
            <DerivedVariable name="x42" value="1/x41" dimension="none"/>
            <DerivedVariable name="x43" value="head2_length*x42" dimension="none"/>
            <DerivedVariable name="x44" value="x19*x40*x43" dimension="none"/>
            <DerivedVariable name="x45" value="1/head2_ggap + 1/head1_ggap" dimension="none"/>
            <DerivedVariable name="x46" value="1/(x20 + x44 + x45)" dimension="none"/>
            <DerivedVariable name="x47" value="head1_V + x1" dimension="none"/>
            <DerivedVariable name="x48" value="1/head1_kK" dimension="none"/>
            <DerivedVariable name="x49" value="1/head1_kCL" dimension="none"/>
            <DerivedVariable name="x50" value="head1_n_CL*x49" dimension="none"/>
            <DerivedVariable name="x51" value="head1_n_K*x48" dimension="none"/>
            <DerivedVariable name="x52" value="out_n_CL*x49" dimension="none"/>
            <DerivedVariable name="x53" value="out_n_K*x48" dimension="none"/>
            <DerivedVariable name="x54" value="out_n_CL*out_n_K" dimension="none"/>
            <DerivedVariable name="x55" value="pi*head1_length" dimension="none"/>
            <DerivedVariable name="x56" value="head1_Gleak*(x13 - x5*log(out_n_CL*x15)) - head1_I_max*head1_diam*head1_kCL*x48*x55*(-head1_n_CL*head1_n_K + x54)/((x50 + 1)*(x51 + 1)*(x52*x53 + 1) + (x52 + 1)*(x53 + 1)*(x50*x51 + 1)) - x21*(x47 - x5*log(neck1_n_CL*x15)) + x39*x46" dimension="none"/>
            <DerivedVariable name="x57" value="1/head2_n_CA" dimension="none"/>
            <DerivedVariable name="x58" value="x29*x43*x57" dimension="none"/>
            <DerivedVariable name="x59" value="1/(x30 + x45 + x58)" dimension="none"/>
            <DerivedVariable name="x60" value="-x23*(head1_n_CA - 5.0e-5) - x31*(x25*log(neck1_n_CA*x28) + x47) + x39*x59" dimension="none"/>
            <DerivedVariable name="x61" value="x17*x38" dimension="none"/>
            <DerivedVariable name="x62" value="head1_kf*head1_n_B*head1_n_CA" dimension="none"/>
            <DerivedVariable name="x63" value="head1_kb*(head1_nTB - head1_n_B)" dimension="none"/>
            <DerivedVariable name="x64" value="F/2" dimension="none"/>
            <DerivedVariable name="x65" value="head1_ca_presyn^2" dimension="none"/>
            <DerivedVariable name="x66" value="1/neck2_length" dimension="none"/>
            <DerivedVariable name="x67" value="-neck2_V" dimension="none"/>
            <DerivedVariable name="x68" value="1/neck2_n_CL" dimension="none"/>
            <DerivedVariable name="x69" value="-dend2_V + neck2_V" dimension="none"/>
            <DerivedVariable name="x70" value="neck2_diam^(-2)" dimension="none"/>
            <DerivedVariable name="x71" value="neck2_length*x70" dimension="none"/>
            <DerivedVariable name="x72" value="x19*x68*x71" dimension="none"/>
            <DerivedVariable name="x73" value="-head2_V" dimension="none"/>
            <DerivedVariable name="x74" value="neck2_V + x73" dimension="none"/>
            <DerivedVariable name="x75" value="1/(x44 + x72)" dimension="none"/>
            <DerivedVariable name="x76" value="neck2_Gleak*(-x5*log(out_n_CL*x68) + x67) - x75*(-x5*log(head2_n_CL*x68) + x74) - (-x5*log(dend2_n_CL*x68) + x69)/(x72 + 1/dend2_half_G_CL)" dimension="none"/>
            <DerivedVariable name="x77" value="1/neck2_n_CA" dimension="none"/>
            <DerivedVariable name="x78" value="x29*x71*x77" dimension="none"/>
            <DerivedVariable name="x79" value="1/(x58 + x78)" dimension="none"/>
            <DerivedVariable name="x80" value="-x23*(neck2_n_CA - 5.0e-5) - x79*(x25*log(head2_n_CA*x77) + x74) - (x25*log(dend2_n_CA*x77) + x69)/(x78 + 1/dend2_half_G_CA)" dimension="none"/>
            <DerivedVariable name="x81" value="x66*x70" dimension="none"/>
            <DerivedVariable name="x82" value="1/head2_length" dimension="none"/>
            <DerivedVariable name="x83" value="head1_V + x73" dimension="none"/>
            <DerivedVariable name="x84" value="head2_V + x67" dimension="none"/>
            <DerivedVariable name="x85" value="1/head2_kK" dimension="none"/>
            <DerivedVariable name="x86" value="1/head2_kCL" dimension="none"/>
            <DerivedVariable name="x87" value="head2_n_CL*x86" dimension="none"/>
            <DerivedVariable name="x88" value="head2_n_K*x85" dimension="none"/>
            <DerivedVariable name="x89" value="pi*head2_length" dimension="none"/>
            <DerivedVariable name="x90" value="head2_Gleak*(-x5*log(out_n_CL*x40) + x73) - head2_I_max*head2_diam*head2_kCL*x85*x89*(-head2_n_CL*head2_n_K + x54)/((x87 + 1)*(x88 + 1)*(x54*x85*x86 + 1) + (out_n_CL*x86 + 1)*(out_n_K*x85 + 1)*(x87*x88 + 1)) + x46*x83 - x75*(-x5*log(neck2_n_CL*x40) + x84)" dimension="none"/>
            <DerivedVariable name="x91" value="-x23*(head2_n_CA - 5.0e-5) + x59*x83 - x79*(x25*log(neck2_n_CA*x57) + x84)" dimension="none"/>
            <DerivedVariable name="x92" value="x42*x82" dimension="none"/>
            <DerivedVariable name="x93" value="head2_kf*head2_n_B*head2_n_CA" dimension="none"/>
            <DerivedVariable name="x94" value="head2_kb*(head2_nTB - head2_n_B)" dimension="none"/>
            <DerivedVariable name="x95" value="head2_ca_presyn^2" dimension="none"/>
            <TimeDerivative variable="neck1_V" value="(x0*x33*(x22 + x32)/neck1_diam)/qqqqq"/>
            <TimeDerivative variable="neck1_n_CL" value="(-x22*x35*x36)/qqqqq"/>
            <TimeDerivative variable="neck1_n_CA" value="(x32*x36*x37)/qqqqq"/>
            <TimeDerivative variable="head1_V" value="(x33*x38*(x56 + x60)/head1_diam)/qqqqq"/>
            <TimeDerivative variable="head1_n_CL" value="(-x35*x56*x61)/qqqqq"/>
            <TimeDerivative variable="head1_n_CA" value="(x37*x61*(x16*x55*x64*(x62 - x63) + x60))/qqqqq"/>
            <TimeDerivative variable="head1_n_B" value="(-2*x62 + 2*x63)/qqqqq"/>
            <TimeDerivative variable="head1_Y" value="(-head1_Y/head1_tau_d)/qqqqq"/>
            <TimeDerivative variable="head1_X" value="((-head1_X - head1_Y + 1)/head1_tau_r)/qqqqq"/>
            <TimeDerivative variable="head1_ggaba" value="(head1_Y*head1_gbar_gaba - head1_ggaba/(head1_eta_gaba/(exp((-head1_ca_presyn + head1_theta_gaba)/head1_sigma_gaba) + 1.0) + head1_tau_gaba0))/qqqqq"/>
            <TimeDerivative variable="head1_ca_presyn" value="(head1_Ip - head1_beta*x65/(head1_Kp^2 + x65) + head1_gamma*log(2/head1_ca_presyn))/qqqqq"/>
            <TimeDerivative variable="neck2_V" value="(x33*x66*(x76 + x80)/neck2_diam)/qqqqq"/>
            <TimeDerivative variable="neck2_n_CL" value="(-x35*x76*x81)/qqqqq"/>
            <TimeDerivative variable="neck2_n_CA" value="(x37*x80*x81)/qqqqq"/>
            <TimeDerivative variable="head2_V" value="(x33*x82*(x90 + x91)/head2_diam)/qqqqq"/>
            <TimeDerivative variable="head2_n_CL" value="(-x35*x90*x92)/qqqqq"/>
            <TimeDerivative variable="head2_n_CA" value="(x37*x92*(x41*x64*x89*(x93 - x94) + x91))/qqqqq"/>
            <TimeDerivative variable="head2_n_B" value="(-2*x93 + 2*x94)/qqqqq"/>
            <TimeDerivative variable="head2_Y" value="(-head2_Y/head2_tau_d)/qqqqq"/>
            <TimeDerivative variable="head2_X" value="((-head2_X - head2_Y + 1)/head2_tau_r)/qqqqq"/>
            <TimeDerivative variable="head2_ggaba" value="(head2_Y*head2_gbar_gaba - head2_ggaba/(head2_eta_gaba/(exp((-head2_ca_presyn + head2_theta_gaba)/head2_sigma_gaba) + 1.0) + head2_tau_gaba0))/qqqqq"/>
            <TimeDerivative variable="head2_ca_presyn" value="(head2_Ip - head2_beta*x95/(head2_Kp^2 + x95) + head2_gamma*log(2/head2_ca_presyn))/qqqqq"/>
            <OnStart>
                <StateAssignment variable="neck1_V" value="-0.0610000000000000"/>
                <StateAssignment variable="neck1_n_CL" value="5"/>
                <StateAssignment variable="neck1_n_CA" value="10"/>
                <StateAssignment variable="head1_V" value="-0.0610000000000000"/>
                <StateAssignment variable="head1_n_CL" value="3.50000000000000"/>
                <StateAssignment variable="head1_n_CA" value="10"/>
                <StateAssignment variable="head1_n_B" value="0"/>
                <StateAssignment variable="head1_ggaba" value="0"/>
                <StateAssignment variable="head1_Y" value="0"/>
                <StateAssignment variable="head1_X" value="0"/>
                <StateAssignment variable="head1_ca_presyn" value="0"/>
                <StateAssignment variable="neck2_V" value="-0.0610000000000000"/>
                <StateAssignment variable="neck2_n_CL" value="5"/>
                <StateAssignment variable="neck2_n_CA" value="10"/>
                <StateAssignment variable="head2_V" value="-0.0610000000000000"/>
                <StateAssignment variable="head2_n_CL" value="3.50000000000000"/>
                <StateAssignment variable="head2_n_CA" value="10"/>
                <StateAssignment variable="head2_n_B" value="0"/>
                <StateAssignment variable="head2_ggaba" value="0"/>
                <StateAssignment variable="head2_Y" value="0"/>
                <StateAssignment variable="head2_X" value="0"/>
                <StateAssignment variable="head2_ca_presyn" value="0"/>
            </OnStart>
        </Dynamics>
        <Exposure name="neck1_V" dimension="none"/>
        <Exposure name="neck1_n_CL" dimension="none"/>
        <Exposure name="neck1_n_CA" dimension="none"/>
        <Exposure name="head1_V" dimension="none"/>
        <Exposure name="head1_n_CL" dimension="none"/>
        <Exposure name="head1_n_CA" dimension="none"/>
        <Exposure name="head1_n_B" dimension="none"/>
        <Exposure name="head1_ggaba" dimension="none"/>
        <Exposure name="head1_Y" dimension="none"/>
        <Exposure name="head1_X" dimension="none"/>
        <Exposure name="head1_ca_presyn" dimension="none"/>
        <Exposure name="neck2_V" dimension="none"/>
        <Exposure name="neck2_n_CL" dimension="none"/>
        <Exposure name="neck2_n_CA" dimension="none"/>
        <Exposure name="head2_V" dimension="none"/>
        <Exposure name="head2_n_CL" dimension="none"/>
        <Exposure name="head2_n_CA" dimension="none"/>
        <Exposure name="head2_n_B" dimension="none"/>
        <Exposure name="head2_ggaba" dimension="none"/>
        <Exposure name="head2_Y" dimension="none"/>
        <Exposure name="head2_X" dimension="none"/>
        <Exposure name="head2_ca_presyn" dimension="none"/>
        <!-- end model -->

    </ComponentType>
</Lems>
